## Palm Springs WWTP:  Option 1 Primary Clarifier Sizing
## Design Basis
Q_PI.Avg := 12.9*mgd
# Assumed average and peak flow rates, including recycle.
# (Sheet 00G05)
Q_PI.Peak := 24.0*mgd
## Clarifier Configuration  and Geometry
N_Clarifiers := 2
mgal := 10^6*gal
D_Clarifier := 100 ft
# Clarifier dimensions, neglecting conical bottom portion.
# (Sheets 20S-01 and 20S-02)
EL_Weir := 370.00 ft
EL_Bottom := 357.70 ft
HW_Clarifier := EL_Weir - EL_Bottom = 12.3 ft
A_Clarifier := π*(D_Clarifier/2)^2 = 7853.98 ft^2
Vol_Clarifier := HW_Clarifier*A_Clarifier = 0.722648 mgal
## Overflow Rate and Detention Time
V_Up.Avg := Q_PI.Avg/(N_Clarifiers*A_Clarifier) = 0.387293 mm/s
V_Up.Avg = 821.24 gal/(ft^2*day)
t_Avg := N_Clarifiers*Vol_Clarifier/Q_PI.Avg
t_Avg = 2.68892 hr
V_Up.Peak := Q_PI.Peak/(N_Clarifiers*A_Clarifier) = 0.720545 mm/s
V_Up.Peak = 1527.89 gal/(ft^2*day)
t_Peak := N_Clarifiers*Vol_Clarifier/Q_PI.Peak
t_Peak = 1.4453 hr
# These values are within the typical range for primary clarifiers. (Metcalf & Eddy, 2003)
