## Flocculator Model - Miramar WTP
## Density and Viscosity Functions
μ_H2O(Τ) := 2.414*10^-5*Pa*s*10^(247.8*K/(Τ - 140 K))
WaterDensityTable := [
    0, 999.9;
    5, 1000;
    10, 999.7;
    20, 998.2;
    30, 995.7;
    40, 992.2;
    50, 988.1;
    60, 983.2;
    70, 977.8;
    80, 971.8;
    90, 965.3;
    100, 958.4
]
cubicspline(xarray, yarray, x) := interp(cspline(xarray, yarray), xarray, yarray, x)
ρ_H2O(Τ) := cubicspline(WaterDensityTable[:, 0], WaterDensityTable[:, 1]*kg/m^3, Τ/K - 273.15)
ν_H2O(Τ) := μ_H2O(Τ)/ρ_H2O(Τ)
## Average Shear and Energy Dissipation Rate
Τ_design := [15 °C; 25 °C]
G_Floc := 50/s  # range of 20-70/s
θ_Floc := 30 min
Gθ_Floc := G_Floc*θ_Floc
Gθ_Floc = 90000
ε_Floc.Avg := G_Floc^2*ν_H2O(Τ_design)
ε_Floc.Avg = [2.84253; 2.23262] mW/kg
## Motor Power
Q_Basin56 := 110*mgd
P_FlocShaft(Τ) := G_Floc*Q_Basin56*Gθ_Floc*vectorize(ν_H2O(Τ)*ρ_H2O(Τ))
P_FlocShaft(Τ_design) = [24.636; 19.3112] kW
# The actual power of the motors in basin 5,6 is
hp_Basin56 := (2*7.5*hp + 4*5*hp)*2 = 52.199 kW
# Each basin has the same line of
# 6 stages and 6 motors
# The design apparently assumed that only the first stage would be at 70/s
## Maximum Energy Dissipation Rate at Propeller Tip
N_Paddle := 3.5*1/min
D_Paddle := 12 ft
H_Propeller := 1.12 ft  # Paddle speed (measured); paddle wheel diameter and paddle board height (scaled from record dwgs)
# Plate ratio (from CFD data for baffled flocculators):
H_Plate := 100 cm
V_Plate := 1*m/s
ε_PlateMax := 0.043*W/kg
Π_Plate := H_Plate^(1/3)*ε_PlateMax^(1/3)/V_Plate = 0.35034
V_Propeller := π*D_Paddle*N_Paddle
V_Propeller = 2.19911 ft/s
ε_PropellerTip := (Π_Plate*V_Propeller)^3/H_Propeller = 37.9336 mW/kg
ε_PropellerTip = 37.9336 mW/kg
G_PropellerTip := sqrt(ε_PropellerTip/ν_H2O(Τ_design[1])) = 206.099 1/s
G_PropellerTip = 206.099 1/s
α_ε := ε_PropellerTip/ε_Floc.Avg
α_ε = [13.345; 16.9907]
## Pilot System Flocculator Configuration
D_Paddle.Pilot := 19.3 in
H_Paddle.Pilot := 1.375 in
L_Paddle.Pilot := 21.25 in  # Paddle dimensions
N_Paddles := 3
r_1 := 3.1875 in
r_2 := 6.0625 in
r_3 := 9.0625 in
A_Paddle.Pilot := N_Paddles*L_Paddle.Pilot*H_Paddle.Pilot = 87.6562 in^2
W_Pilot := 22.5 in
L_Pilot := 22.5 in  # Length and width of each floc basin
Vol_Pilot := 60.9 gal  # Water volume and depth
HW_Pilot := Vol_Pilot/(W_Pilot*L_Pilot) = 27.7884 in
C_D := 1.5
# Appoximate drag coefficient.
# (Mixing in Coag. and Floc. p. 412)
## Calculated Pilot Speed to Match Maximum Energy Dissipation Rate
ε_FlocJarTip == (Π_Plate*V_Tip.Pilot)^3/H_Paddle.Pilot == (Π_Plate*(π*D_Paddle.Pilot*N_Floc.Pilot))^3/H_Paddle.Pilot
# If we solve for an rpm that matches the energy dissipation rate of the full scale flocculator we get:
N_Floc.Pilot.Scaled := H_Paddle.Pilot^(1/3)*ε_PropellerTip^(1/3)/(π*D_Paddle.Pilot*Π_Plate)
N_Floc.Pilot.Scaled = 12.2135 1/min
ε_Floc.Pilot.Scaled := C_D*A_Paddle.Pilot/Vol_Pilot*(π/2*D_Paddle.Pilot*N_Floc.Pilot.Scaled)^3/2 = 0.708571 mW/kg
## Average and Peak Pilot Test Energy Dissipation Rate
N_Floc.Pilot := 12*1/min  # Pilot apparatus speed setting
V_Tip.Pilot := π*D_Paddle.Pilot*N_Floc.Pilot = 1.01055 ft/s
V_Avg.Pilot := (π/2*D_Paddle.Pilot*N_Floc.Pilot) = 0.505273 ft/s
# For a single continuous paddle, the average velocity along the paddle is half the tip velocity.
ε_Floc.Pilot.Tip := (Π_Plate*V_Tip.Pilot)^3/H_Paddle.Pilot
ε_Floc.Pilot.Tip = 35.9786 mW/kg
# Estimate power based on Reynolds and Richards (1996) eq. 8.16 or Mixing in Coag. and Floc. (1991) eq. 11-29.
P_Floc.Pilot := C_D*A_Paddle.Pilot*ρ_H2O(Τ_design[1])/2*(2*π*N_Floc.Pilot*0.75)^3*(r_1^3 + r_2^3 + r_3^3) = 579.881 mW
ε_Floc.Pilot.Avg := P_Floc.Pilot/(Vol_Pilot*ρ_H2O(Τ_design[1]))
ε_Floc.Pilot.Avg = 2.52277 mW/kg
α_Floc.Pilot := ε_Floc.Pilot.Tip/ε_Floc.Pilot.Avg
α_Floc.Pilot = 14.2615
## Pilot Test Average Shear and Gθ
Q_Pilot := 2*gpm  # Pilot system flow rate
N_Basins.Pilot := 3
N_Basins.Pilot.Online := 1  # Number of floc basins in the pilot system.
θ_Pilot := N_Basins.Pilot.Online*Vol_Pilot/Q_Pilot
θ_Pilot = 30.45 min
G_Floc.Pilot := sqrt(ε_Floc.Pilot.Avg/ν_H2O(Τ_design[1]))
G_Floc.Pilot = 53.1499 1/s
Gθ_Floc.Pilot := G_Floc.Pilot*θ_Pilot
Gθ_Floc.Pilot = 97104.8
## Pilot Test Rapid Mix
G_RapidMix.Pilot := 1000 s^-1
ε_RapidMix.Pilot := G_RapidMix.Pilot^2*ν_H2O(Τ_design[1])
ε_RapidMix.Pilot = 0.893046 W/kg
