# Sedimentation Capture Velocity Estimates
# Miramar WTP - Full Scale Plant
V_Capture.MWTP.Basin1.2 := 0.54 gpm/ft^2
V_Capture.MWTP.Basin1.2 = 0.366713 mm/s
Q_Basin3.4 := 80 mgd
Q_Basin5.6 := [20; 40; 110] mgd
A_Plates.Basin3.4 := 142000 ft^2
A_Plates.Basin5.6 := 173700 ft^2
V_Capture.MWTP.Basin3.4 := Q_Basin3.4/A_Plates.Basin3.4
V_Capture.MWTP.Basin3.4 = 0.391236 gpm/ft^2
V_Capture.MWTP.Basin3.4 = 0.265688 mm/s
V_Capture.MWTP.Basin5.6 := Q_Basin5.6/A_Plates.Basin5.6
V_Capture.MWTP.Basin5.6 = [0.0799591; 0.159918; 0.439775] gpm/ft^2
V_Capture.MWTP.Basin5.6 = [0.0543; 0.1086; 0.29865] mm/s
# Miramar WTP - Pilot-Scale Inclined Plates
L_Plates := 20 in
W_Plates := 22 in
Q_Pilot := 2 gpm
α_Plates := 60°
D_Plates := 5 cm
N_Plates := 3
V_Up.Plate := Q_Pilot/(N_Plates*W_Plates*D_Plates) = 1.50537 mm/s
V_Capture.Pilot := V_Up.Plate/((L_Plates/D_Plates)*cos(α_Plates) + sin(α_Plates))
V_Capture.Pilot = 0.253173 mm/s
# Alvarado WTP
Q_Plant.AWTP := 120 mgd
L_Basins12.AWTP := 137.6 ft
L_Basins34.AWTP := 236.92 ft
W_Basins12.AWTP := 170 ft
W_Basins34.AWTP := 93.5 ft
A_Basins12.AWTP := L_Basins12.AWTP*W_Basins12.AWTP = 23392 ft^2
A_Basins34.AWTP := L_Basins34.AWTP*W_Basins34.AWTP = 22152 ft^2
V_Capture.AWTP := Q_Plant.AWTP/(2*A_Basins12.AWTP + 2*A_Basins34.AWTP)
V_Capture.AWTP = 0.621283 mm/s
