## Floc Sedimentation Model
# Adachi, Y., and Tanaka, Y. (1997). “Settling velocity of an aluminum kaolinite floc.”  Water Res., 31(4), 449-454..
## Physical Constants
ρ_w := 998.2*kg/m^3  # Density of water (at 20 deg C)
μ_w := 0.0010016*N*s/m^2
# Dynamic viscosity of water
# (at 20 deg C)
ν_w := μ_w/ρ_w = 1.00341 mm^2/s
# Kinematic viscosity of water
# (at 20 deg C)
g = 9.80665 m/s^2  # Gravitational acceleration
## Model Inputs
## Range of Floc Sizes
d_Floc.Range := 0.001 mm, 0.002 mm .. 1 mm  # Range of particle sizes
## Primary Particle Properties
ρ_Floc0 := 2640*kg/m^3
# Particle density
# (supended clay particles)
d_0 := 1 μm  # Primary particle size
## Floc Properties
D_Fractal := 2.3  # Floc fractal dimension
ϕ := 45/24  # Floc shape factor
## Floc Settling Velocity
V_t(d) := (g*d_0^2/(18*ϕ*ν_w))*((ρ_Floc0 - ρ_w)/ρ_w)*(d/d_0)^(D_Fractal - 1)
V_Capture.Low := 0.27*mm/s
V_Capture.High := 0.37*mm/s  # Range of capture velocities at the existing sed tanks
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