## Model Inputs
D_Fractal := 2.3  # based on data from Adachi
C_Clay := 100*mg/L
d_Clay := 1 μm
C_Alum := 45*mg/L
d_Final := 1 mm
d_0 := 1 μm  # based on data from Adachi
D_F1 := 2.1
D_F2 := 2.3
D_F3 := 2.5  # range of fractal dimensions used for some graphs
ε := 3*mW/kg
Φ := 45/24  # shape factor for drag on flocs
# Initial densities
ρ_Clay := 2650*kg/m^3
ρ_AlOH3 := 2420*kg/m^3
ρ_H2O := 1000*kg/m^3
ν := 1*10^-6*m^2/s
Al := 27*gm/mole
S := 32.064*gm/mole
O := 16*gm/mole
H := 1.008*gm/mole
Ca := 40*gm/mole
Carbon := 12*gm/mole
MW_Alum := 2*Al + 3*(S + 4*O) + 14.3*(2*H + O)
MW_Alum = 599.821 gm/mol
MW_CalciumCarbonate := Ca + Carbon + 3*O
MW_CalciumCarbonate = 100 gm/mol
MW_AlOH3 := Al + 3*(O + H)
MW_AlPolymer := 13*Al + 32*(O + H) = 895.256 gm/mol
MW_Alum/(2*Al) = 11.1078
MW_Alum/6*2/MW_CalciumCarbonate = 1.9994
# Given alum dose find alum hydroxide concentration
C_AlOH3(C_Alum) := C_Alum/(MW_Alum/2)*MW_AlOH3/1
MW_AlPolymer/13 = 68.8658 gm/mol
C_AlPolymer(C_Alum) := C_Alum/(MW_Alum/2)*MW_AlPolymer/13
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C_Floc(C_Alum, C_Clay) := C_AlOH3(C_Alum) + C_Clay
Mole_Al(C_Alum) := C_Alum/MW_Alum*2
0.001*0.096*mol/L = 0.096 mol/m^3  # millimole dm-3
Mole_Al(29*mg/L) = 0.0966955 mol/m^3
N_A := 6.0221415*10^23*mole^-1
# annotation to a formula above: from The NIST Reference on Constants, Units, and Uncertainty, from CODATA Recommended Values of the Fundamental Constants - 2002, by Peter J. Mohr and Barry N. Taylor, National Institute of Standards and Technology.
h_Hamaker := 0.3*10^-20*J
L_SepartionAl := (1/(N_A*Mole_Al(30*mg/L)))^(1/3) = 25.5098 nm
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# http://www.dur.ac.uk/sharon.cooper/lectures/colloids/interfacesweb1.html#_Toc449417615
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I := 1/2*sum(c)*z^2  # error: This variable is undefined.
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κ := 3.288*sqrt(I)  # error: This variable is undefined.
# Total attractive potential energy between two particles is
PE_Attractive(D) := -A/(12*π*D^2) + 64*n_0*k_B*T/κ*exp(-κD)  # error: This variable is undefined.
# Find the thickness of the aluminum hydroxide layer on the clay assuming the aluminum hydroxide has the bulk density of aluminum hydroxide
C_Alum := 4*mg/L
N_Clay(C_Clay) := C_Clay/(ρ_Clay*1/6*π*d_Clay^3)
π/6*d_Clay^3 + V_AlOH3 == π/6*(d_Clay + T_AlOH3)^3
billion := 10^9
Mole_Al(C_Alum)*N_A/N_Clay(C_Clay) = 111445854
N_Clay(C_Clay) = 72.0702 billion/L
(1/N_Clay(C_Clay))^(1/3) = 24.0297 μm
C_AlPolymer(C_Alum)
V_AlPolymer(C_Alum, C_Clay) := C_AlPolymer(C_Alum)/(ρ_AlOH3*N_Clay(C_Clay))
V_AlOH3(C_Alum, C_Clay) := C_AlOH3(C_Alum)/(ρ_AlOH3*N_Clay(C_Clay))  # volume of aluminum hydroxide per clay particle
V_AlPolymer(C_Alum, C_Clay) = 5266250 nm^3
V_AlOH3(C_Alum, C_Clay) = 5966585 nm^3
D_AlOH3(C_Alum, C_Clay, N_Globs) := (6/π*V_AlOH3(C_Alum, C_Clay)/N_Globs)^(1/3)
# Model clay as a square with thickness 1/10 of its length and width.
V_Clay == L_Clay^3*Π_Clay  # get relationship between length of clay plate and diameter of clay sphere
V_Clay == π/6*d_Clay^3
L_Clay^3*Π_Clay == V_Clay
L_Clay^3*Π_Clay == π/6*d_Clay^3
Π_Clay := 1/10
L_Clay := (π/(6*Π_Clay))^(1/3)*d_Clay = 1.73647 μm
L_Clay*Π_Clay = 0.173647 μm
1.5/20 = 0.075
V_Alum == L_Clay^2*T_Alum + 4*L_Clay^2*Π_Clay*T_Alum
d_Clay = 1e-6 m
L_Clay*Π_Clay*5*1.5/L_Clay = 0.75
V_Alum/(((π/(6*Π_Clay))^(1/3)*d_Clay)^2*(1 + 4*Π_Clay)) == T_Alum
C_Clay = 0.1 kg/m^3
C_Alum = 0.004 kg/m^3
T_AlOH3(C_Alum, C_Clay) := V_AlOH3(C_Alum, C_Clay)/(((π/(6*Π_Clay))^(1/3)*d_Clay)^2*(1 + 4*Π_Clay))
T_AlOH3(C_Alum, C_Clay) = 1.4134 nm
T_Clay := Π_Clay*L_Clay = 173.647 nm
T_AlPolymer(C_Alum, C_Clay) := (d_Clay^3 + 6*V_AlPolymer(C_Alum, C_Clay)/π)^(1/3) - d_Clay
T_AlOH3(5*mg/L, 15*mg/L) = 11.7783 nm
T_AlPolymer(C_Alum, C_Clay) = 3.34142 nm
# The thickness of the aluminum hydroxide coating is substantial. It is many molecules thick.
# The thickness of the aluminum polymer coating is substantial. It is many molecules thick.
MolecularSpacing_AlOH3 := (MW_AlOH3/(ρ_AlOH3*N_A))^(1/3) = 0.376895 nm
MolecularSpacing_AlPolymer := (MW_AlPolymer/(ρ_AlOH3*N_A))^(1/3) = 0.850081 nm
# The molecular spacing is a low estimate. It is possible that the aluminum hydroxide layer is less dense than bulk aluminum hydroxide.
# The molecular spacing is a low estimate. It is possible that the aluminum hydroxide layer is less dense than bulk aluminum hydroxide.
N_AlOH3Layer(C_Alum, C_Clay) := T_AlOH3(C_Alum, C_Clay)/MolecularSpacing_AlOH3
N_AlPolymerLayer(C_Alum, C_Clay) := T_AlPolymer(C_Alum, C_Clay)/MolecularSpacing_AlPolymer
N_AlOH3Layer(C_Alum, C_Clay) = 3.75012
# The number of molecular layers in the aluminum hydroxide coating
# The number of molecular layers in an aluminum polymer coating
C_AlumGraph := 1*mg/L, 2*mg/L .. 100*mg/L
N_AlPolymerLayer(C_Alum, C_Clay) = 3.93071
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# The number of molecular layers in the aluminum hydroxide coating is quite large and always exceeds 10 for an effective alum dose.
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C_ClayGraph := 1*mg/L, 2*mg/L .. 500*mg/L
C_AlumMatt(C_Clay) := 7.8*mg/L*(C_Clay/(mg/L))^0.4
C_AlumFReTA(C_Clay) := 2*mg/L + 4*mg/L*(C_Clay/(mg/L))^(1/3)
# What is the diameter of an aluminum hydroxide glob if there are N globs per clay particle?
N_Globs := 30
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D_AlOH3(20*mg/L, 100*mg/L, N_Globs) = 123.839 nm
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# Figure 1. Number of molecular layers covering the clay particles assuming the alum concentration follows the relationship given by the red curve in the plot to the right.
# What mechanism could possibly explain why so much aluminum hydroxide is needed to make the clay particles begin to stick together? It can't be charge neutralization because the required alum dose isn't proportional to the clay concentration. By the same arguement, it can't be the achievement of a certain thickness of surface coverage either.
#
# Could it be related to the competing options for adsorption of aluminum hydroxide molecules?  The key question here is whether it is better to have the aluminum hydroxide precipitate on the clay or create a larger aluminum hydroxide molecule or floc before sticking to the clay. As the clay concentration increases it becomes more difficult for the aluminum to interact with other aluminum ions (or molecules) before being captured by a clay particle. The distance between clay particles decreases with the number of clay particles raised to the 1/3 power.  and if the alum concentration were held constant it would become more likely that the aluminum hydroxide would precipitate directly on the clay. Is the exponent on the clay particle concentration in the dosing equation related to the distance between clay particles?
#
# If the clay particles are actually a undesirable sink for aluminum species in the first seconds of rapid mix, then there may be better ways to add aluminum coagulants to the raw water. It may be better to neutralize the coagulant with as little raw water as possible so that interactions between aluminum species is favored. Then after the aluminum has had a few seconds to form larger molecules or flocs (we don't know which is important yet) then we could combine the netural pH coagulant feed with the rest of the raw water.
#
# Interactions between aluminum species in this first stage of rapid mix when the pH is brought to neutral are controlled by diffusion. However, the diffusion is assisted by a very high energy dissipation rate that creates thin bands of the coagulant fluid and the higher pH fluid. Thus this first stage requires two steps, blending and molecular diffusion to raise the pH and provide access to more hydroxide and then interactions between the new aluminum hydroxide species as they begin to precipitate or form polymeric species.
# We can determine the distance between clay particles
L_SeparationColloids(C_Clay) := (ρ_Clay/C_Clay*π*d_Clay^3/6)^(1/3)
L_SeparationColloids(500*mg/L) = 14.0526 μm
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d(D_Fractal, d_0, i) := d_0*2^(i/D_Fractal)
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n(D_Fractal, d_0, d) := D_Fractal*log(d/d_0, 2)
n(D_Fractal, d_0, d_Final) = 22.9213
n(2.1, d_0, d_Final) = 20.9281
ifunction(D_Fractal) := 0 .. ceil(n(D_Fractal, d_0, d_Final))
i := ifunction(D_Fractal)
# set up an array of diameters for creating graphs
d_array[i] := d(D_Fractal, d_0, i)
i1 := ifunction(D_F1)
d_F1[i1] := d(D_F1, d_0, i1)
i2 := ifunction(D_F2)
d_F2[i2] := d(D_F2, d_0, i2)
i3 := ifunction(D_F3)
d_F3[i3] := d(D_F3, d_0, i3)
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ϕ_Floc.0(C_Alum, C_Clay) := C_AlOH3(C_Alum)/ρ_AlOH3 + C_Clay/ρ_Clay
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ϕ(C_Alum, C_Clay, D_Fractal, d_0, d) := ϕ_Floc.0(C_Alum, C_Clay)*(d/d_0)^(3 - D_Fractal)
C_Alum := 5*(mg/L)
C_Clay := 30*mg/L
ϕ(C_Alum, C_Clay, D_Fractal, d_0, 1 mm) = 0.00149287
ϕ(C_Alum, 0*mg/L, 1.85, 1.2 nm, 180 nm) = 0.000170961
ϕ_AlumFloc(C_Alum, C_Clay, D_Fractal, d_0, d) := (ϕ(C_Alum, 0*mg/L, 1.85, 1.2 nm, 180 nm) + ϕ_Floc.0(0*mg/L, C_Clay))*(d/d_0)^(3 - D_Fractal)
ϕ_AlumFloc(5*mg/L, 30*(mg/L), D_Fractal, d_0, 1 mm) = 0.0229479
# Even at a relatively low dose of alum the floc volume fraction goes way too high if the alum aggregation is assumed to have a low fractal dimension.
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ϕ_Floc(C_Alum, C_Clay, D_Fractal, i) := ϕ_Floc.0(C_Alum, C_Clay)*2^((3/D_Fractal - 1)*i)
ϕ_Floc(C_Alum, C_Clay, D_Fractal, n(D_F3, d_0, 3 mm)) = 0.00524393
## Letterman estimate of floc volume fraction
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r := 9*10^-6*mole/m^2
# at a surface aluminum concentration of approximately
# 9 X lo* mol/m2, and therefore, this value was
# assumed to be equal to r
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A_S := 23*m^2/gm
k_Letterman := 120*L/mole
ϕ_Letterman(C_Alum, C_Clay) := C_Clay/ρ_Clay + k_Letterman*(2*(r*A_S*C_Clay)*ln((e^(Mole_Al(C_Alum)/(r*A_S*C_Clay)) + 1)/2) - Mole_Al(C_Alum))
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D_FlocLetterman := 0.3 mm, 0.4 mm .. 3 mm
# FB is for Plate settler spacing Floc Blanket.
# This estimate is based on the rate of floc blanket growth and the bulk porosity of the resulting floc blanket.
# I think that the floc blanket never settled past the top part of the cone from pictures, although it is hard to confirm how far down because of the cone. The column is 4" I.D. and the cone is 5" in length sloping up at a 70 degree angle. The base is 0.5" in diameter. I'm sorry that the final height could not be determined, but the heights in the data set given to you is where the floc blanket was at those times.
#
# Monroe's interpretation of the data is that the flocs settled completely into the cone in 30 minutes.
ConeTopDiameter := 4 in
ConeHeight := 5 in
V_cone(r, h) := π*r^2*h/3
ConeBottomDiameter := 0.5 in
ColumnHeight := 27.5 in
ConeFullHeight := ConeHeight*(ConeTopDiameter + ConeBottomDiameter)/ConeTopDiameter = 5.625 in
ConeVolume := V_cone(ConeTopDiameter/2, ConeFullHeight) - V_cone(ConeBottomDiameter/2, ConeFullHeight - ConeHeight) = 0.385441 L
ColumnVolume := (ColumnHeight - ConeHeight)*π*ConeTopDiameter^2/4 = 4.63333 L
V_FBinitial := ConeVolume + ColumnVolume = 5.01877 L
V_FBFinal := ConeVolume  # The flocs all settled into the cone at 30 minutes of sedimentation
Φ_FB := V_FBFinal/V_FBinitial = 0.0767998
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ϕ_FB := 50*μm/s/(1.16*mm/s)*(1 - Φ_FB) = 0.0397931  # https://confluence.cornell.edu/display/AGUACLARA/PSS+Floc+Blanket+Formation
C_ClayFB := 100*mg/L
C_AlumFB := 45*mg/L
## Plate Settler Spacing Team estimate of floc volume fraction
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ϕ_Letterman(C_AlumFB, C_ClayFB) = 0.0146031
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C_Alumlocal(C_Clay) := 15*mg/L*(1 + log(C_Clay/(mg/L)))
C_Claylocal := 1*mg/L, 2*mg/L .. 500*mg/L
ϕ(C_AlumFB, 0*mg/L, D_F1, d_0, d_0)/ϕ(0*mg/L, C_ClayFB, D_F1, d_0, d_0) = 0.128198
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ρ_Floc.0(C_Alum, C_Clay) := C_Floc(C_Alum, C_Clay)/ϕ_Floc.0(C_Alum, C_Clay)
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ρ_Floc(C_Alum, C_Clay, D_Fractal, d_0, d) := ((ρ_Floc.0(C_Alum, C_Clay) - ρ_H2O)*(d_0/d)^(3 - D_Fractal) + ρ_H2O)
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# Relationship between terminal velocity and floc diameter without any dependence on the number of collisions
V_t(C_Alum, C_Clay, D_Fractal, d_0, d) := g*d_0^2/(18*Φ*ν)*(ρ_Floc.0(C_Alum, C_Clay) - ρ_H2O)/ρ_H2O*(d/d_0)^(D_Fractal - 1)
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ρ_Floc.0(C_Alum, C_Clay) = 2639.57 kg/m^3
d_fVt(C_Alum, C_Clay, D_Fractal, d_0, V_t) := d_0*(18*V_t*Φ*ν/(g*d_0^2)*ρ_H2O/(ρ_Floc.0(C_Alum, C_Clay) - ρ_H2O))^(1/(D_Fractal - 1))
## Adachi measured values used to estimate d.0 and D.Fractal
# Wat. Res. Vol. 31, No. 3, pp. 449~54, 1997
# © 1997 Elsevier Science Ltd
# Pegglunon Printed in Great Britain. All rights t~served
# PIh S0043-1354(96)00274-6 01M3-1354/97 $17.00 + 0.00
C_AlumAdachi := 40*mg/L
# We can check the predicted terminal velocity of the flocs by comparing with measured values. The dotted lines are from one data set with the diameter of the flocs measured three different ways. The model predicted values are within the range of measured values except for very small flocs.
C_ClayAdachi := 50*mg/L
d_Adachi := 0.03 mm, 1 mm .. 1 mm
D_FAdachi := 2.379
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d_0Adachi := (ν/(ρ_Floc.0(C_AlumAdachi, C_ClayAdachi)/ρ_H2O - 1)*18*Φ/g*4.946*mm/s*(1/mm)^(2.3 - 1))^(1/(3 - 2.3)) = 1.50813 μm
iAdachi := ifunction(D_FAdachi)
d_Adachi[iAdachi] := d(D_FAdachi, d_0Adachi, iAdachi)
d_0 = 1e-6 m
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# Comparison of model predictions for three different Fractal dimensions and measured values of diameters and settling velocities of aluminum clay flocs. D.v is diameter of a sphere with equivalent cross sectional area as 2-D projection of the floc, D.m is the maximum distance in the floc projection, and D.e is the Feret diameter of a floc measured in the projection perpendicular to the settling direction.
100*m/day = 0.00115741 m/s
10*mm/s = 864 m/day
# According to {{125 Wu,R.M. 1998;}} Stokes law applies up to a Re of 40, Here I estimate the maximum floc size that has a sedimentation velocity that follows Stokes Law.
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Re_max := 40
d_max := (Re_max/(g*d_0^(3 - 2.3))*18*Φ*ν^2*ρ_H2O/(ρ_Floc.0(C_Alum, C_Clay) - ρ_H2O))^(1/2.3)
d_max = 2.78774 mm
C_Alum/C_Clay = 0.166667
V_max := V_t(C_Alum, C_Clay, D_Fractal, d_0, d_max) = 14.3485 mm/s
D_Fractal = 2.3
C_Alum = 5 mgm/L
Re(V, d, ν) := V*d/ν
# The maximum floc size that experiences stokes settling is 2 mm
Re(V_max, d_max, ν) = 40
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# {{214 Gmachowski,Lech 2006;}}
# Comparison of the velocity provided by Brownian Motion with the velocity caused by velocity gradients to determine the floc size that corresponds to the switch between diffusion flocculation and viscous subrange flocculation.
k_b := 1.3806505*10^-23*joule/K
T := 293 K
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ε_RM := 1000*mW/kg
D_Molecular := k_b*T/(3*π*ρ_H2O*ν*MolecularSpacing_AlOH3) = 1.13883e-9 m^2/s
# I think this should actually be the density of the molecule rather than the density of water.
t_diffusioninitialestimate := L_SepartionAl^2/D_Molecular = 0.571417 μs
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t_DiffusionRM := (ν^3/ε_RM)^(1/2)*1/D_Molecular = 0.878093 s
L_Separation(C_Alum, C_Clay, D_Fractal, d_0, d) := d_0*(π/(6*ϕ_Floc.0(C_Alum, C_Clay)))^(1/3)*(d/d_0)^(D_Fractal/3)
# At what length scale does the transition from diffusion to viscous subrange occur?
# Set velocity due to Brownian motion equal to velocity due to viscous subrange velocity gradient
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# Set the two velocities equal
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# Separation distance where transition occurs between brownian and viscous transport
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# Assume fractal dimension is 3 for this early aggregation
# This is the transition dimension between diffusion and shear
L_Brν(C_Alum, C_Clay, ε) := (k_b*T/(3*π*ρ_H2O*sqrt(ε*ν)))^(1/3)*(π/(6*ϕ_Floc.0(C_Alum, C_Clay)))^(1/9)
d_0Br := MolecularSpacing_AlOH3
D_FractalBr := 3
# This is the separation distance
L_Brν(C_Alum, C_Clay, ε_RM) = 0.247553 μm
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d_Brν(C_Alum, C_Clay, D_Fractal, d_0Br, ε) := d_0Br*(k_b*T/(3*d_0Br^3*π*ρ_H2O*sqrt(ν*ε))*(6*ϕ_Floc.0(C_Alum, C_Clay)/π)^(2/3))^(3/(2*D_Fractal + 3))
ε_Br := 6*mW/kg  # Here we assume that the onset of shear mediated collisions occurs in the flocculator rather than in the rapid mix.
d_Brν(C_Alum, 0*mg/L, 3, d_0Br, ε_Br) = 8.26165 nm
# This is the particle size of the aluminum hydroxide nanofloc at the transition from diffusion to shear dominated collisions.
# This phase is the initial aggregation of the aluminum hydroxide precipitate. It isn't clear what role the raw water colloids play in this process. The raw water colloids are at a much larger scale and have separation distances that are much larger than the separation distances between aluminum hydroxide molecules. Thus the majority of the aggregation process is taking place as collisions between aluminum hydroxide molecules. Aluminum hydroxide precipiate also collides with the raw water colloids.
# During this phase the solids are dominated in volume by the raw water colloids.
#
# This suggests that the diffusion process rapid mix could help the
#
# The volume of the aluminum hydroxide precipitate is small compared with the volume of colloids.
ϕ_Floc.0(C_Alum, 0*mg/L)/ϕ_Floc.0(0*mg/L, C_Clay) = 0.0474806
C_Claygraph := 1*mg/L, 2*mg/L .. 500*mg/L
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# Thus initially the volume of aluminum hydroxide is tiny compared with the volume of the raw water particles for all but very low turbidity raw water.
d_Brν(C_Alum, 0*mg/L, D_FractalBr, d_0Br, ε_Br) = 8.26165 nm
# How many collisions are required to grow from original precipitate to d.Brν?
n_0toBrν := n(D_FractalBr, d_0Br, d_Brν(C_Alum, 0*mg/L, D_FractalBr, d_0Br, ε_Br))
n_0toBrν = 13.3626
# These collisions will be relatively rapid because the length scale is very small and diffusion will be very effective. The collisions at the end of this process will be the slowest because diffusion slows down as the length scale increases. The time scale of the last collision is extremely long (160 s) if we don't include the interaction with clay and if we use low alum dosages (see t_BrνtoΔFractal below). The floc  volume fraction is constant during this diffusive growth process (the fractal dimension is 3).
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t_cdiffusive(C_Alum, C_Clay, d) := 2/3*(π/6)^(1/3)*(d^3/ϕ_Floc.0(C_Alum, C_Clay)^(4/3))*3*π*ν*ρ_H2O/(k_b*T)
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t_cdiffusive(C_Alum, 0*mg/L, d_Brν(C_Alum, 0*mg/L, D_FractalBr, d_0Br, ε_Br)) = 161.525 s
t_cdiffusive(C_Alum, 0*mg/L, d_0Br) = 0.0153356 s  # This is the time for the initial collisions between molecules
# Here we need to figure out the diameters after each subsequent collision and then calculate the collision time for each collision. Then we can sum up the collison times.
t_cdiffusiveTotal(C_Alum, C_Clay, d_0Br, ε_Br, D_FractalBr) :=
    t_cBr ← 0 s
    for i_Br ∈ (0 .. round(n(D_FractalBr, d_0Br, d_Brν(C_Alum, C_Clay, D_FractalBr, d_0Br, ε_Br))) - 1)
        t_cBr ← t_cBr + t_cdiffusive(C_Alum, C_Clay, d(D_FractalBr, d_0Br, i_Br))
    return t_cBr
t_cdiffusiveTotal(10*mg/L, 0*mg/L, d_0Br, ε_Br, D_FractalBr) = 99.7061 s
# The diffusion stage could take a long time. Note that shear decreases this time by reducing the scale at which shear dominates. Thus fewer diffusion mediated collisions occur when shear is stronger.
t_cdiffusiveTotal(10*mg/L, 0*mg/L, d_0Br, ε_RM, D_FractalBr) = 6.22592 s  # Higher shear would decrease the amount of time where diffusion dominates.
# The time per collisions increases so rapidly with particle size that the last collision dominates the total time required for all of the collisions. For an alum dose of 10 mg/L it takes 200 s. For an alum dose of 100 mg/L it takes 37 seconds. However, if we increase the energy dissipation rate to 1000mW/kg, then this time is reduced to 12 seconds.
# The total time required for the diffusion limited aggregation is highly dependent on the assumptions that we make about this stage. If this stage is dominated by aluminum hydroxide aggregation and if raw water colloids are larger than 100 μm?????, then it would seem that the majority of the collisions will be between aluminum hydroxide precipitate and aluminum hydroxide precipitate or between aluminum hydroxide precipitate and raw water colloids. This reaction time is almost independent of the assumption of the initial precipitate dimension since the first collisions are extremely rapid. Changing the initial size from 0.1 nm to 1 nm makes almost no difference.
# My model for this stage is too simplistic because I am assuming there is one size of particle when actually there are two sizes (aluminum hydroxide precipitate and raw water colloids). It isn't clear if the volume fraction contributed by the raw water colloids plays a significant role during this stage since those colloids are relatively slow moving. Thus I am currently setting the raw water colloid concentration to zero for these calculations.
# The separation distance at the end of the diffusion limited aggregation of the aluminum hydroxide precipitate is
L_Separation(C_Alum, 0*mg/L, 3, d_0Br, d_Brν(C_Alum, 0*mg/L, D_FractalBr, d_0Br, ε_Br)) = 818.972 nm
Π_BrG(C_Alum, C_Clay, D_FractalBr, d_0, d, ε) := k_b*T/(3*π*ρ_H2O*d_Brν(C_Alum, C_Clay, D_FractalBr, d_0Br, ε)*L_Separation(C_Alum, C_Clay, D_FractalBr, d_0, d)^2*sqrt(ε*ν))
Π_BrG(C_Alum, C_Clay, D_FractalBr, d_0Br, 9 nm, ε_RM) = 0.605621
# I need a tcdiffusion function to predict collision times for
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t_claminar(C_Alum, C_Clay, D_Fractal, d_0, d, ε) := 1/6*(6/π)^(1/3)*ϕ_Floc.0(C_Alum, C_Clay)^(-2/3)*(ν/ε)^(1/2)*(d/d_0)^(2*D_Fractal/3 - 2)
# Note that collision time for viscous aggregation is independent of size (i) for fractal dimension of 3
# How long do collisions take at the Brν length scale? Here I assume that the diameter of the aluminum hydroxide floc is independent of the raw water colloid concentration, but that the collision time at this stage is affected by the raw water colloid concentration because relative motion is set by viscous velocity gradients.
t_BrνtoΔFractal := t_claminar(C_Alum, C_Clay, 3, d_Brν(C_Alum, 0*mg/L, 3, d_0Br, ε_Br), d_Brν(C_Alum, 0*mg/L, 3, d_0Br, ε_Br), ε_Br)
t_BrνtoΔFractal = 5.13365 s
# This process is slow because the separation distance is large enough that diffusion is slow and the floc volume fraction is still low because the fractal dimension is 3. This collision time is constant as the floc grows from the Brν scale to the scale where the fractal dimension reduces. It appears that collisions in the Brν scale to the scale where the fractal dimension decreases are caused by viscous shear, but the particle formation is still affected by diffusion that causes the aggregate to grow in a compact fashion. THe reason for the difference in the transport and the particle formation processes is that the length scale for the transport process is the particle separation distance while the length scale for the particle formation process is the particle diameter.
#
# Here I am assuming that the raw water colloids participate in the collisions since the transport process is viscous.
#
# The number of collisons to go from the Brν scale to the Fractal dimension transition is
d_0 = 1 μm
n_BrνtoΔFractal := n(3, d_Brν(C_Alum, 0*mg/L, 3, d_0Br, ε_RM), d_0)
n_BrνtoΔFractal = 24.4485
# Total reaction time to grow from Brν to the fractal dimension transition is
T_BrνtoΔFractal(C_Alum, C_Clay, D_Fractal, d_0Br, d_0, ε_RM) := t_claminar(C_Alum, C_Clay, D_Fractal, d_Brν(C_Alum, C_Clay, D_Fractal, d_0Br, ε_RM), d_Brν(C_Alum, C_Clay, D_Fractal, d_0Br, ε_RM), ε_RM)*n(D_Fractal, d_Brν(C_Alum, 0*mg/L, D_Fractal, d_0Br, ε_RM), d_0)
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T_BrνtoΔFractal(10*mg/L, 10*mg/L, 3, d_0Br, d_0, ε_RM) = 17.1665 s
# This time required for this stage is highly dependent on
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t_cturbulent(C_Alum, C_Clay, D_Fractal, d_0, d, ε) := 1/6*(6/π)^(1/9)*ϕ_Floc.0(C_Alum, C_Clay)^(-8/9)*ε^(-1/3)*d^(2/3)*(d/d_0)^(8*(D_Fractal - 3)/9)
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t_cturbulent(C_Alum, C_Clay, D_Fractal, d_0, 1 mm, ε) = 4.03656 s
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η_Kolmogorov(ε) := (ν^3/ε)^(1/4)
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η_Kolmogorov(ε) = 135.12 μm
d_Kolmogorov(C_Alum, C_Clay, d_0, D_Fractal, ε) := d_0*(1/d_0*(ν^3/ε)^(1/4)*(6*ϕ_Floc.0(C_Alum, C_Clay)/π)^(1/3))^(3/D_Fractal)
t_c(C_Alum, C_Clay, D_Fractal, d_0, d, ε) :=
    t_c ← t_claminar(C_Alum, C_Clay, D_Fractal, d_0, d, ε) if L_Separation(C_Alum, C_Clay, D_Fractal, d_0, d) ≤ η_Kolmogorov(ε)
    t_c ← t_cturbulent(C_Alum, C_Clay, D_Fractal, d_0, d, ε) otherwise
    return t_c
ε := 3*mW/kg
t_c(C_Alum, C_Clay, D_F1, d_0, 1 mm, ε) = 1.18217 s
ε = 3 mW/kg
d_0 = 1e-6 m
Clay := 10*mg/L
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ε = 3 mW/kg
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# Collision times as a function of floc diameter for an energy dissipation rate of 1 mW/kg, clay concentration of 10 mg/L,  and alum concentration of 20 mg/L. The change in slope at approximately 7 μm marks the transition from the viscous to  turbulent length scales.
# Conventional design guidelines from Water Treatment Plant Design {{116 Baruth, Edward E. 2005;}}
C_AlumMatt(Clay) = 19.5927 mgm/L
t_reactiontimes(C_Alum, C_Clay, D_Fractal, d_0, d_Final, ε) :=
    n ← n(D_Fractal, d_0, d_Final)
    t ← 0 s
    for i ∈ 0 .. n - 1
        t ← t + t_c(C_Alum, C_Clay, D_Fractal, d_0, d(D_Fractal, d_0, i), ε)
    return t
ε_local := 0.1*mW/kg, 0.2*mW/kg .. 10*mW/kg
ε_ofG(G_conventionaldesign) := G_conventionaldesign^2*ν
G_hyd := [10; 10; 100; 100; 10]*1/s
θ_hyd := [1800; 900; 900; 1800; 1800]*s
ε_ofG(G_hyd) = [0.1; 0.1; 10; 10; 0.1] mW/kg
Clay := 1*mg/L
10*m/day = 0.115741 mm/s
V_Capture := 0.12*mm/s
d_Capture := d_fVt(C_Alum, C_Clay, D_Fractal, d_0, V_Capture)
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d_Capture = 70.3201 μm
d_local := 3 mm
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t_reactiontimes(C_AlumMatt(1*mg/L), 1*mg/L, D_Fractal, d_0, d_Capture, ε)*ε^(1/3) = 52.2834 m^(2/3)
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t_sumlaminar(C_Alum, C_Clay, D_Fractal, d_0, ε) :=
    d_K ← d_Kolmogorov(C_Alum, C_Clay, d_0, D_Fractal, ε)
    n_K ← round(n(D_Fractal, d_0, d_K))
    1/6*(6/π)^(1/3)*ϕ_Floc.0(C_Alum, C_Clay)^(-2/3)*(ν/ε)^(1/2)*sum(2^((2/3 - 2/D_Fractal)*i), i = 0 .. n_K - 1)
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t_sumturbulent(C_Alum, C_Clay, D_Fractal, d_0, d_Final, ε) :=
    d_K ← d_Kolmogorov(C_Alum, C_Clay, d_0, D_Fractal, ε)
    n_K ← round(n(D_Fractal, d_0, d_K))
    n_F ← ceil(n(D_Fractal, d_0, d_Final)) - 1
    1/6*(6/π)^(1/9)*ϕ_Floc.0(C_Alum, C_Clay)^(-8/9)*(d_0^2/ε)^(1/3)*sum(2^((8/9 - 2/D_Fractal)*i), i = n_K .. n_F)
d_Final = 1 mm
Clay := 1*mg/L
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# Total collision time in the laminar stage of flocculation, the turbulent stage of flocculation, and the combined total all as functions of the energy dissipation rate. The energy dissipation rate is assumed to be constant and unform throughout the flocculator. The input parameters are D_Fractal = 2.3,d_Final = 1 mm, Clay = 1 mgm/L.
# We can calculate Gθ for a laminar flow flocculator
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Gθ(C_Alum, C_Clay, D_Fractal, d_0, d_Final) := 1/6*(6/π)^(1/3)*ϕ_Floc.0(C_Alum, C_Clay)^(-2/3)*sum(2^((2/3 - 2/D_Fractal)*i), i = 0 .. ceil(n(D_Fractal, d_0, d_Final)) - 1)
Gθϕ(D_Fractal, d_0, d_Final) := 1/6*(6/π)^(1/3)*sum(2^((2/3 - 2/D_Fractal)*i), i = 0 .. ceil(n(D_Fractal, d_0, d_Final)) - 1)
d_0 = 1e-6 m
d_Final = 1 mm
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d_0 = 1e-6 m
Gθϕ(D_Fractal, d_0, d_Final) = 1.51408
ceil(n(D_Fractal, d_0, d_Final)) = 23
C_Claylocal := 1*mg/L, 2*mg/L .. 100*mg/L
d_Capture = 70.3201 μm
# Matt Hurst data
# Monroe,
#
# Here is what you requested. The calculations are without the short lengths
#
# in the flocculator where there was no coiling. I can include them in
#
# calculations if you wish.
#
# In observations for 100 NTU water: (alum dose = 45 mg/L)
#
# The 1 mm floc was present approximately 4 m in coiling. The average G for
#
# the flocculator was 25.4 s- while theta was about 54 s giving a Gtheta of
#
# 1380.
#
# The 3 mm floc grew was present approximate 10 m in coiling. The average G
#
# again was 25.4 s-, while theta was 130 s giving a Gtheta of 3300.
#
# In observations of 10 NTU water: (alum dose = ?? mg/L
#
# The 1 mm was observed at approximately 25.4 m in the coiling. The average
#
# G again was 25.4 s- while theta was 339 s giving a Gtheta of 8600.
Gθ_Matt := [1380; 8600]
ϕ_Floc.0Matt := [ϕ_Floc.0(45*mg/L, 100*mg/L); ϕ_Floc.0(15*mg/L, 10*mg/L)]
Clay_Matt := [100; 10]
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μm
# Figure x. The flocculation potential for a laminar flow reactor characterized by Gq
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# There is very little difference between 1 and 3 mm flocs as far as the Gθ required to produce them.
# The floc volume fraction is over emphasizing the effect of clay and underestimated the effect of alum.
ϕ_Floc.0Matt = [4.25735e-5; 5.38613e-6]
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# Terminal velocity as a function of Gθ for 3 suspensions. Note the rapid increase in sedimentation velocity with Gθ under conditions when floc break up isn't significant.
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Π_Floc(C_Alum, C_Clay, D_Fractal, d_0, d_Final) := d_Final^(2/3)*2^(-2/3*log(d_Final/d_0, 2))*1/6*(6/π)^(1/9)*ϕ_Floc.0(C_Alum, C_Clay)^(-8/9)*sum(2^((8/9 - 2/D_Fractal)*i), i = 0 .. ceil(n(D_Fractal, d_0, d_Final)) - 1)
ε_10 := 10*mW/kg
ε := 0.4*mW/kg
ε_0.1 := 0.1*mW/kg
ε_1 := 1*mW/kg
Π_Floc(C_AlumMatt(Clay), Clay, D_Fractal, d_0, d_Capture) = 53.5158 m^(2/3)
ε = 0.4 mW/kg
G_0.4 := sqrt(10*mW/kg/ν) = 100 1/s
d_Finalmin := d_fVt(C_AlumMatt(50*mg/L), 50*mg/L, D_Fractal, d_0, 0.1*mm/s) = 0.0619892 mm
ν = 1e-6 m^2/s
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# The variation in the required collision potential as a function of turbidity and the energy dissipation rate. The variation is much large for Gθ than for the other term. The results obtained here are highly dependent on the final floc size. For very small flocs the viscous region is more significant and thus Gθ isn't as variable.
Clay := 1*mg/L
100 m^(2/3)*d_0^(-2/3) = 1e6
t_reactiontimes(C_AlumMatt(Clay), Clay, D_Fractal, d_0, d_Final, ε_0.1)*ε_0.1^(1/3)/(t_reactiontimes(C_AlumMatt(Clay), Clay, D_Fractal, d_0, d_Final, ε_10)*ε_10^(1/3)) = 1.18998
t_reactiontimes(C_AlumMatt(Clay), Clay, D_Fractal, d_0, d_Final, ε_10)*ε_10^(1/2)/(t_reactiontimes(C_AlumMatt(Clay), Clay, D_Fractal, d_0, d_Final, ε_0.1)*ε_0.1^(1/2)) = 1.81047
C_Claylocal := (1*mg/L, 2*mg/L .. 1000*mg/L)
exponent := 1/3
exponent2 := 1/2
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d_Final = 0.001 m
# Shows the error in the collision potential parameterization as a function of the exponent of the energy dissipation rate and the clay concentration. The 1/3 exponent has the lowest error up to a turbidity of 100. For high turbidities the flocs are closer together and hence are transported by viscous process for more of the flocculatio process.
ε = 0.0004 m^2/s^3
ε := 6*mW/kg
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V_Up := 100*m/day
phi := 0.5
C_s := 0.025
ρ_bulkfloc := (1 + 0.687*C_s)*ρ_H2O = 1017.17 kg/m^3
ε_flocblanket := g*V_Up*0.687*C_s/phi = 0.389882 mW/kg
h_flocblanket := 45 cm
ψ_flocblanket := ε_flocblanket^(1/3)*h_flocblanket/V_Up*phi = 14.2017 m^(2/3)
# The calculation of the floc blanket collision potential is an over estimate because the floc blanket reduces the volume of flocs in the pore water suspension through filtration mechanisms. Given that a 45 cm floc bed removes the majority of the turbidity it is possible that
# Example design
C_ClayMin := 1*mg/L
C_AlumMatt(C_ClayMin) = 7.8 mgm/L
n(D_Fractal, d_0, d_Final) = 22.9213
Π_Floc(C_AlumMatt(C_ClayMin), C_ClayMin, D_Fractal, d_0, d_Final) = 86.7706 m^(2/3)
# set energy dissipation rate to 2 mW/kg
ε_example := 2*mW/kg
θ := Π_Floc(C_AlumMatt(C_ClayMin), C_ClayMin, D_Fractal, d_0, d_Final)/ε_example^(1/3) = 11.4783 min
# What is the size of the AlOH3 molecules? Calculate it based on the density.
N_A := 6.0221415*10^23*mole^-1
MW_AlOH3 = 0.078024 kg/mol
# This is difusion limited aggregation
# http://scitation.aip.org/getpdf/servlet/GetPDFServlet?filetype=pdf&id=JCPSA6000089000001000246000001&idtype=cvips&prog=normal
M_AlOH3 := MW_AlOH3/N_A
d_AlOH3.0 := (6*M_AlOH3/(π*ρ_AlOH3))^(1/3) = 0.467614 nm
π*d^3/6 == M/ρ
# Two stage model for particle collisions
# first stage aimless drifting to clear occupied volume this is the time I calculate for the collison time. I now have to make the case that the time for the sucessful collision is much less.
# 2nd stage successful approach over distance L.separation
# The analysis below is overly simplified because the approach velocity decreases as the particles get closer and thus the time must be integrated.
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# But the average velocity during approach is less than the maximum velocity
# Let particle be on streamline that is distance d perpendicular from streamline of target and length L away from target.
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t_approachviscous(C_Alum, C_Clay, D_Fractal, d_0, d, ε) := sqrt(ν/ε)*L_Separation(C_Alum, C_Clay, D_Fractal, d_0, d)/d
# Inertial approach is inertial up to Kolmogorov length scale and then viscous up to the collision
t_approachinertia(C_Alum, C_Clay, D_Fractal, d_0, d, ε) := 3/(2*ε^(1/3))*(L_Separation(C_Alum, C_Clay, D_Fractal, d_0, d)^(2/3) - η_Kolmogorov(ε)^(2/3))
t_approach(C_Alum, C_Clay, D_Fractal, d_0, d, ε) :=
    t ← t_approachviscous(C_Alum, C_Clay, D_Fractal, d_0, d, ε) if L_Separation(C_Alum, C_Clay, D_Fractal, d_0, d) ≤ η_Kolmogorov(ε)
    t ← t_approachinertia(C_Alum, C_Clay, D_Fractal, d_0, d, ε) + sqrt(ν/ε)*η_Kolmogorov(ε)/d otherwise
    return t
ε := 1*mW/kg
η_Kolmogorov(ε) = 0.177828 mm
Clay := 100*mg/L
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# This shows that the time required to travel the distance between flocs is short compared with the time spent wandering around lost!
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# Plot of the relative distance traveled during the clearance and the approach stages of the collisions.
# How does relative velocity compare with sedimentation velocity?
# How could we characterize the filtration process of large flocs clearing the suspension of tiny colloids?
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# Below is the relative velocity due to sedimentation divided by the relative velocity of two large flocs based on their separation distance. But I don't think the relative velocity of two large flocs is the right velocity to use to characterize the ability of a floc to sweep up colloids. We need a measure of the velocity of the fluid relative to the floc due to the velocity gradients in the fluid. This would provide a measure of how much of the fluid is filtered by a floc.
Π_V(C_Alum, C_Clay, D_Fractal, d_0, d, ε) := V_t(C_Alum, C_Clay, D_Fractal, d_0, d)/(ε*L_Separation(C_Alum, C_Clay, D_Fractal, d_0, d))^(1/3)
Π_V(C_Alum, C_Clay, D_Fractal, d_0, d_Final, ε) = 0.197334
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Π_V(C_Alum, C_Clay, D_Fractal, d_0, d, ε) :=
    Π_V ← V_t(C_Alum, C_Clay, D_Fractal, d_0, d)/(L_Separation(C_Alum, C_Clay, D_Fractal, d_0, d)*(ε/ν)^(1/2)) if L_Separation(C_Alum, C_Clay, D_Fractal, d_0, d) ≤ η_Kolmogorov(ε)
    Π_V ← V_t(C_Alum, C_Clay, D_Fractal, d_0, d)/(ε*L_Separation(C_Alum, C_Clay, D_Fractal, d_0, d))^(1/3) otherwise
    return Π_V
ε := 2*mW/kg
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# Thus the sedimentation velocity of large flocs DOES contribute significantly to their collisions with smaller flocs.
# What fraction of the colloids would be swept up in the time that a big floc clears the volume that it occupies? This would be a first order reaction with exponential decay.
# We need a model for what fraction of the fluid goes through a floc.
e^(-1/log(e)) = 0.1
# Could we find the time required to get 90% removal of colloids?
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# Here we use the projected area of the large floc to estimate the clearance area. This estimate is undoubtedly too high because the stream lines must diverge somewhat around the porous floc AND some colloids must pass through the floc without being filtered. It is possible that the pC* for colloids that pass through the floc is actually very small given the short path.
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t_Sweep(C_Alum, C_Clay, D_Fractal, d_0, d) := 4*d/(6*ϕ(C_Alum, C_Clay, D_Fractal, d_0, d)*V_t(C_Alum, C_Clay, D_Fractal, d_0, d))
C_Alum = 0.005 kg/m^3
C_Clay = 0.03 kg/m^3
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t_Sweep(C_Alum, C_Clay, D_Fractal, d_0, d_Final) = 118.007 s
t_Sweep(C_Alum, C_Clay, D_Fractal, d_0, d_Final)/log(e) = 271.722 s
# Thus 90% of the colloids should be removed about every 30 seconds. I don't think we've  observed the turbidity dropping this fast, so my guess is that the clearance area that I am using is way too high and many of the colloids that pass through a floc are not captured. This model does suggest that increases in pC* should be proportional to increases in flocculation time for this mechanisms of floc filtration.
# Floc sedimentation analysis in the end of the flocculator.
ε_FlocGraph := 10*mW/kg, 100*mW/kg .. 1000*mW/kg
d_maxf(ε) := 75*μm*(ε/(W/kg))^(-1/3)
# based on Ian's work with floc size as a function of energy dissipation rate, but this is for the average energy dissipation rate in a tube flocculator. It isn't clear how to convert this to the turbulent flow case. Maybe the flocs are mostly experiencing viscous shear. But that isn't clear. Some authors have made the case that floc breakup is due to viscous effects. If that is the case, then the results from the tube flocculatolr should be applicable to the turbulent case. But we have to account for the temporal and spatial variability in the turbulent energy dissipation rate.
V_r(ε) := (ε*d_maxf(ε))^(1/3)
d_Floc := d_maxf(1*mW/kg) = 750 μm
V_t(C_Alum, C_Clay, D_Fractal, d_0, d_Floc) = 2.6035 mm/s
V_tofε(ε) := V_t(C_Alum, C_Clay, D_Fractal, d_0, d_maxf(ε))
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# This graph compares the sedimentation velocity with the eddy velocity for eddies that are the sizeof the flocs. The size of the flocs is set by the energy dissipation rate. This analysis suggests that floc sedimentation will be a problem for energy dissipation rates that approach 0.1 mW/kg. The energy dissipation rate at the end of the flocculator at cuatro comunidades is approximately 0.06 mW/kg at 60 gpm and thus these results are consistent with floc sedimentation problems at that energy dissipation rate. Marcala is running at approximately 0.4 mW/kg peak energy dissipation rate at the end of the flocculator
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